// SBML level 3 version 2

model PBK_Cd()
  // model units - substance: MicroGM, time: DAY, volume: L, area: area, extent: MicroGM

  // Compartments:
  compartment default_compartment = 1 L;
  compartment Liver = 1 L; Liver is "liver";
  compartment Kidney = 1 L; Kidney is "kidney";
  compartment Others = 1 L; Others is "other tissues";
  compartment Feces = 1 L; Feces is "feces";
  compartment Urine = 2 L; Urine is "urine";
  compartment Intestine = 1 L; Intestine is "intestine";
  compartment Gut = 1 L; Gut is "gut";
  compartment Lung = 1 L; Lung is "lung";
  compartment Expo = 1 L; Expo is "total systemic exposure";
  compartment Excretion = 1 L; Excretion is "excreta";
  compartment Plasma = 1 L; Plasma is "plasma";
  compartment RBC = 1 L; RBC is "red blood cells";
  compartment Metallothionein = 1 L; Metallothionein is "metallothionein";

  // Species:
  substanceOnly species AExpo in Expo = 0;
  substanceOnly species AGut in Gut = 0; AGut is "Amount in gut";
  substanceOnly species ALiver in Liver = 0; ALiver is "Amount in liver";
  substanceOnly species AKidney in Kidney = 0; AKidney is "Amount in kidney";
  substanceOnly species ALung in Lung = 0; ALung is "Amount in lungs";
  substanceOnly species AUrine in Urine = 0; AUrine is "Amount in urine";
  substanceOnly species AFeces in Feces = 0; AFeces is "Amount in feces";
  substanceOnly species AIntestine in Intestine = 0; AIntestine is "Amount in intestine";
  substanceOnly species APlasma in Plasma = 0; APlasma is "Amount in plasma";
  substanceOnly species ARBC in RBC = 0; ARBC is "Amount in red blood cells";
  substanceOnly species ABlood3 in Metallothionein = 0; ABlood3 is "Amount in metallothionein";
  substanceOnly species AOthers in Others = 0; AOthers is "amount in other tissues";
  species AMetallothionein in default_compartment = 0;
  species ABlood1 in default_compartment = 0;

  // Parameters:
  BW has kg; BW is "body weight";
  Age has YR; Age is "age";
  DeltaBW = 1 UNITLESS;
  Age_init = 0 YR;
  C1_cig = 0.1;
  C1_dust = 0.7;
  C2_cig = 0.4;
  C2_dust = 0.13;
  C3 = 0.05 PER_DAY; C3 is "Rate of transfer of inhalation intake to uptake pool";
  C4 = 0.005 PER_DAY; C4 is "Rate of transfer of air Cd to the GI-tract";
  C5 = 0.048 UNITLESS; C5 is "Fraction of GI-tract Cd retained in epithelium";
  C6 = 0.05 PER_DAY; C6 is "Rate of transfer of Cd in the GI-tract to uptake pool";
  C7 = 0.25 UNITLESS; C7 is "Fraction of uptake pool transferred to blood";
  C8 = 1000 MicroGM; C8 is "Maximum mass of Cd in uptake pool";
  C9 = 0.44 PER_DAY; C9 is "Rate of transfer from plasma to other tissues";
  C10 = 0.00014 PER_DAY; C10 is "Rate of transfer of Cd in other tissues to plasma";
  C11 = 0.27 PER_DAY; C11 is "Rate of transfer of Cd in plasma to feces";
  C12 = 0.25 PER_DAY; C12 is "Rate of transfer of Cd in plasma to liver";
  C13 = 3e-5 PER_DAY; C13 is "Rate of transfer of Cd in liver to plasma";
  C14 = 0.00016 PER_DAY; C14 is "Rate of transfer of Cd in liver to metallothionein";
  C15 = 5e-5 PER_DAY; C15 is "Rate of transfer of Cd in liver to feces";
  C16 = 0.012 PER_DAY; C16 is "Rate of transfer of Cd in blood red blodd cells to metallothionein";
  C17 has PER_DAY; C17 is "Rate of transfer of Cd in metallothionein to kidney";
  C18 = 1e-5 PER_DAY; C18 is "Rate of transfer of Cd in kidney to plasma";
  C19 has PER_DAY; C19 is "Age-specific rate constant for transfer of Cd in kidney to urine";
  C21 = 1.1e-6; C21 is "Increased transfer of Cd from kidney to urine after age 30";
  C20 = 0.1 UNITLESS; C20 is "Fraction of Cd in plasma and red blood cells that contribute to cadmium in whole blood";
  CX = 0.04 PER_DAY; CX is "Rate of transfer of Cd in B1 to blood B2";
  VCreat has g;
  AExcretion = 0 MicroGM; AExcretion is "total excretion amount (urine+feces)";

  // Assignment rules:
  BW := (3.938425 + 0.7518199*Age*12 - 0.02023793*(Age*12)^2 + 0.0002921682*(Age*12)^3 - 2.06762e-6*(Age*12)^4 + 8.469e-9*(Age*12)^5 - 2.188427e-11*(Age*12)^6 + 3.699776e-14*(Age*12)^7 - 4.099077e-17*(Age*12)^8 + 2.874804e-20*(Age*12)^9 - 1.159732e-23*(Age*12)^10 + 2.052602e-27*(Age*12)^11)*DeltaBW;
  Age := Age_init + time/365;
  I2 := piecewise(C7*AExpo, C7*AExpo < C8, C8);
  C17 := piecewise(0.95, Age < 30, 0.95 - 0.95/3*(Age - 30)/50);
  C19 := piecewise(0.00014, Age < 30, 0.00014 + C21*(Age - 30));
  VCreat := piecewise(0.032 + 0.02098*Age + 0.009104*Age^2 - 0.000455*Age^3 + 7.578e-6*Age^4 - 4.232e-8*Age^5, Age < 70, 0.032 + 0.02098*70 + 0.009104*70^2 - 0.000455*70^3 + 7.578e-6*70^4 - 4.232e-8*70^5);

  // Reactions:
  _J0: AGut -> AIntestine; (AGut + ALung*C4)*C5;  // modifiers: ALung
  _J1: ALung -> AExpo; ALung*C3;
  _J2: AIntestine -> AExpo; AIntestine*C6;
  _J3: AExpo -> ABlood3; I2;
  _J4: AExpo -> ABlood1; AExpo - I2;
  _J5: APlasma -> AOthers; APlasma*C9;
  _J6: APlasma -> ARBC; APlasma*CX;
  _J7: AOthers -> APlasma; AOthers*C10;
  _J8: APlasma -> AFeces; APlasma*C11;
  _J9: APlasma -> ALiver; APlasma*C12;
  _J10: ALiver -> APlasma; ALiver*C13;
  _J11: ALiver -> AMetallothionein; ALiver*C14;
  _J12: ALiver -> AFeces; ALiver*C15;
  _J13: ARBC -> AMetallothionein; ARBC*C16;
  _J14: AMetallothionein -> AKidney; AMetallothionein*C17;
  _J15: AKidney -> ABlood1; AKidney*C18;
  _J16: AKidney -> AUrine; AKidney*C19;
  _J17: AMetallothionein -> AUrine; AMetallothionein*(1 - C17);

  // Unit definitions:
  unit day = 86400 second;
  unit substance = 1e-6 gram;
  unit microg_kg = 1e-6 gram / (1000 gram);
  unit volume = litre;
  unit kg = 1000 gram;
  unit g = gram;
  unit area = 1;
  unit m = 1;
  unit MicroGM = 1e-6 gram;
  unit DAY = 86400 second;
  unit L = litre;
  unit YR = 3.15576e7 second;
  unit UNITLESS = dimensionless;
  unit PER_DAY = 1 / (86400 second);
end
